# Cell relaxation after atomic HFTN relaxation
# Target pressure = 0.5 GPa = 5000 bar

units metal
atom_style charge
boundary p p p

pair_style born/coul/long 12.0

read_data data.Anorthite-P0.5GPa-relaxed2

kspace_style pppm 1.0e-5

mass 1 40.08
mass 2 24.31
mass 3 26.98
mass 4 28.09
mass 5 16.00

# Matsui charges
set type 1 charge 0.9450
set type 2 charge 0.9450
set type 3 charge 1.4175
set type 4 charge 1.8900
set type 5 charge -0.9450

# Matsui (1998) pair coefficients
pair_coeff 1 1 0.003469071552 0.08 2.344 20.9873025 0.0
pair_coeff 1 2 0.003469071552 0.08 2.066 13.548469725 0.0
pair_coeff 1 3 0.0032088911856 0.074 1.9572 17.17227729 0.0
pair_coeff 1 4 0.0027318938472 0.063 1.8924 22.99275585 0.0
pair_coeff 1 5 0.0077186842032 0.178 2.9935 42.259099545 0.0

pair_coeff 2 2 0.003469071552 0.08 1.788 8.74628990025 0.0
pair_coeff 2 3 0.0032088911856 0.074 1.6792 11.0856590061 0.0
pair_coeff 2 4 0.0027318938472 0.063 1.6144 14.8431012765 0.0
pair_coeff 2 5 0.0077186842032 0.178 2.7155 27.2805964841 0.0

pair_coeff 3 3 0.0029487108192 0.068 1.5704 14.0507388848 0.0
pair_coeff 3 4 0.0024717134808 0.057 1.5056 18.8131837866 0.0
pair_coeff 3 5 0.0074585038368 0.172 2.6067 34.5773343388 0.0

pair_coeff 4 4 0.0019947161424 0.046 1.4408 25.189841409 0.0
pair_coeff 4 5 0.0069815064984 0.161 2.5419 46.2971912793 0.0

pair_coeff 5 5 0.0119682968544 0.276 3.643 85.0910446616 0.0

neighbor 1.0 bin
neigh_modify delay 10 every 2 check yes

thermo 10
thermo_style custom step pe etotal enthalpy vol press density fnorm fmax

# Relax all three lattice dimensions to 0.5 GPa.
# Keep the triclinic tilt factors constrained as in the existing workflow.
fix boxrelax all box/relax x 5000.0 y 5000.0 z 5000.0 couple none

min_style cg

minimize 1.0e-10 1.0e-8 200000 200000

write_data data.Anorthite-P0.5GPa-cell3
